n_b := 4
b := 250
fc' := 30
h := 520
a := 0
d_s := 12
cc := 40
d_b := 25
c_c := cc + d_s + d_b/2 + a = 64.5
fy := 414
d := h - c_c = 455.5
L := 7
β :=
    if fc' ≤ 28
        0.85
    else if fc' ≥ 56
        0.65
    else
        0.85 - 0.05*(fc' - 28)/7
    = 0.835714
A_s := n_b*π/4*d_b^2 = 1963.5
c_initial := 0.85*fc'*β*c_initial*b == A_s*fy solve, c_initial → 152.578104744
fs_initial := 600*(d - c_initial)/c_initial = 1191.21
c :=
    if fs_initial > fy
        c_initial
    else
        (1.17647058824*(510.0*A_s*β*d*fc' + 90000.0*A_s^2)^0.5 - 352.941176471*A_s)/(β*fc')
    = 152.578
a := β*c = 127.512
fs := 600*(d - c)/c = 1191.21
ϕ :=
    if fs ≥ 1000
        0.9
    else if fs ≤ fy
        0.65
    else
        0.65 + 0.25*(fs - fy)/(1000 - fy)
    = 0.9
M_n := 0.85*fc'*a*b*(d - a/2)/1000^2 = 318.444
M_u := ϕ*0.85*fc'*a*b*(d - a/2)/1000^2 = 286.599
# a. What ultimate uniform load can the beam carry if it has a simply supported span of 7m?
M_u == w_u*L^2/8 solve, w_u → 46.7917368904
# b. What is the ultimate uniform dead load (wuDL) carried by the beam if the service live load is 10kN/m?
w_LL := 10
M_u == w_uDL*L^2/8 + 1.6*w_LL*L^2/8 solve, w_uDL → 30.7917368904
# c.  What additional service live load at the midspan can the beam carry if it has a service dead load of 20kN/m (including its own weight) and a service live load of 12kN/m?
w_DL := 15
w_LL := 0
M_u == 1.2*w_DL*L^2/8 + 1.6*(P_LL*L/4 + w_LL*L^2/8) solve, P_LL → 62.9819244478
