M_u := 56.8*6^2/8 + 48*6/4 = 327.6
fc' := 21
fy := 276
d_b := 28
β :=
    if fc' ≤ 28
        0.85
    else if fc' ≥ 56
        0.65
    else
        0.85 - 0.05*(fc' - 28)/7
    = 0.85
ρ := 0.6*0.85*fc'/fy*β*3/8
ϕ := 0.9
ω := ρ*fy/fc' = 0.162562
d := M_u*1000^2 == ϕ*fc'*d/2*d^2*ω*(1 - ω/1.7) solve, d, assume, ALL == real → 617.799741421 = 617.8
d_actual := ceil(d/10)*10 = 620
b := d_actual/2 = 310
A_s := ρ*b*d = 2368.86
n_b := ceil(A_s/(π/4*d_b^2)) = 4
spacingr := 40*2 + 4*28 + 3*28 = 276
if(b > spacingr, "ok", "redesign") = "ok"
